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1
3
y(x) := (x - 1)*(x + 3)^2
4  # a  # DOF - any number
b
y(x) := x^3 + 5*x^2 + 3*x - 9
d/dx((x - 1)*(x + 3)^2) → (x + 3)^2 + 2*(x - 1)*(x + 3)  # function is not odd
# function is not even
((x + 3)^2 + 2*(x - 1)*(x + 3)) == 0
k := -20 .. 20
# - extremum points
y(k) = [
    -6069; -5120; -4275; -3528; -2873; -2304; -1815; -1400; -1053; -768
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]
[-3; -1/3]
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d/dx((x + 3)^2 + 2*(x - 1)*(x + 3)) → 6*x + 10
6*x + 10 == 0
# -5/3 | Inflection point | Inflection point
6*(-2) + 10 = -2  # Concave graph
6*(-1) + 10 = 4  # Convex graph
# c | function is continuous
# no break points
2
f(x) := (x + 3)^2 + 2*(x - 1)*(x + 3)
d
y(1) = 0
x := -4  # -infinitive to -3
y(-3) = 0
f(x) = 11
# 5. Порядок выполнения работы | -3 to -1/3 | e | function is continuous so no vertical asymptotes
x := -1
# 1. Ознакомьтесь с разделом описания лабораторной работы и выполните указанные действия самостоятельно. Все результаты необходимо сохранить как рабочий документ.
#
# 2. Исследуйте, по выше приведенному плану, поведение указанных ниже функций, и постройте их графики. Самостоятельно определите диапазон изменения аргумента, что бы отразить в этом диапазоне характерное изменение функции, и его шаг так, что бы количество точек не превышали 100. Выбор функции по соответствию номера ФИО в списке группы у преподавателя номеру строки в списке  функций.
f(x) = -4
x := 2  # -1/3 to infinitive
f(x) = 35
# -infinitive to -3 - increase
# -3 to -1/3 - decrease
# -1/3 to infinitive - increase
# 1 | 2 | 3
y(x) := (x + 2)/e^x
y(x) := (x^2 - 3*x + 2)/(x + 1)^2
1.
y(x) := x^4 - 2*x^3 - 8
2
y(x) := x^3/3 - 3*x^2/2 + 2*x + 1
y(x) := e^x/(1 - x)
y(x) := x^4/(x + 1)^3
3
y(x) := x^3 - 3*x^2
y(x) := e^(1/(x + 1))
y(x) := (4 - x)/(9*(2 - x))
4
y(x) := x^2/(1 - x)
y(x) := x^5 - 5*x + 3
y(x) := e^(1/(1 - x))
y(x) := ln(x)/x
y(x) := x^2/(x - 2)
y(x) := (x - 1)/(x + 3)
5
y(x) := x/ln(x)
y(x) := x^3/(1 - x^2)
6
y(x) := (x + 2)^2/(x - 1)
y(x) := (x - 2)/(x - 2)^2
y(x) := x*ln(x)
7
y(x) := 3*x^4 - 4*x + 1
8
y(x) := x^3*ln(x)
y(x) := x^2/(x - 1)^2
y(x) := x^4 - 2*x^2 + 8
y(x) := e^(-x)*(x + 4)
y(x) := 4*x/(x - 2)^2
9
y(x) := (x - 1)*(x + 3)^2
y(x) := x/(x^2 - 4)
y(x) := ln(2*x^2 + 3)
10
y(x) := x^4 - 4*x^2 + 5
y(x) := e^x*(x + 2)
y(x) := x^3/(2*(x + 1))
11
y(x) := (x + 1)^2*(x - 1)^2
y(x) := x^3/(x^2 - 1)
y(x) := ln(9 - x^2)
12
y(x) := x^3 - 3*x + 3
y(x) := (x - 1)*e^(3*x + 1)
y(x) := x^4 - 2*x^2 + 1
13
y(x) := 4/(x^2 - 4*x + 3)
y(x) := e^(1/x)
y(x) := (x^2 + x)/(x - 1)
14
y(x) := x^4 - 4*x^2 + 3
15
y(x) := x^3 - 3*x + 1
y(x) := x*e^x
y(x) := (x^2 + 1)/(x^2 - 1)
16
y(x) := (x + 2)^2*(x + 4)^2
y(x) := (x - 1)/e^x
y(x) := x^3/(12*(x - 2))
17
y(x) := 3*x^4 - 4*x^3 + 1
y(x) := x*(ln(x) - 3)
y(x) := x/(1 - x^2)
y(x) := (x - 2)/(x + 3)^2 - 1
18
y(x) := x^3 - 12*x^2 + 36*x
y(x) := ln(x^2 + 1)
y(x) := x/e^x
y(x) := x/(x - 2)^2
19
y(x) := 2 + x^2 - x^4/4
y(x) := 1/(x^2 - 3*x + 2)
y(x) := x^3*e^(-x)
y(x) := x^4/4 - 2*x^2
20
y(x) := x/(x^2 - 1)^(1/3)
y(x) := ln(x^2 - 4)
21
y(x) := x^3 - 3*x^2 + 2
y(x) := x/(x + 2)^2
y(x) := x^5/5 - x^3/3
y(x) := x^2*e^(-x)
22
y(x) := x^3 - 12*x
y(x) := x^2 - 2*ln(x)
y(x) := (x - 3)^2/(4*(x - 1))
23
y(x) := 2*x^2/(4*x^2 - 1)
y(x) := 4*x^2 - x^4 - 3
y(x) := ln(x^2 + 4*x)
24
y(x) := ln(x)/x^(1/2)
y(x) := (2*x + 1)/x^2
y(x) := x^3/3 - 4*x + 3
25
y(x) := x/(3 - x^2)
y(x) := x^2*(ln(x) - 1)
y(x) := (x + 1)^2*(x + 2)
26
y(x) := 3/(x^2 - 5*x + 4)
y(x) := (x - 1)^2*(x + 3)
y(x) := ln(16 - x^2)
27
